// COMSOL Multiphysics 6.3.0.420 model "Surface_trap(v4)Final.mph"
// Outline of the model tree

Parameters
  center_width = 0.1126[mm]  // Width of center DC Electrode
  rf_width = 0.1982[mm]  // Width of RF Electrodes
  rf_spacing = 0.1913[mm]  // Spacing from Centre
  V_rf = 337.5739[V]  // RF Voltage of Rods
  V_dc = 99.8045[V]  // DC Voltage of Rods
  endcap_rad = 3.0000[mm]  // Endcap Radius
  endcap_thick = 0.2027  // Endcap Thickness
  endcap_offset = 0.5009[mm]  // Distance of Endcap from Trap
  V_endcap = 0.5047[V]  // DC Voltage of Endcap
  f = 25.000[MHz]  // RF Frequency
  e_charge = 1.602176634e-19  // electronic charge
  Yb171_u = 170.93633151  // mass of Yb ion
  u_to_kg = 1.6605390666e-27[kg]
  m_Yb171 = Yb171_u*u_to_kg
  q_Yb = e_charge  // charge of Yb ion
  eps0 = 8.8541878128e-12  // vacuum permittivity
  length = 1.1815[mm]  // length of the trap.

Variables
  var2 "Variables"
    omega = 2*pi*f
    E2 = es.Ex^2 + es.Ey^2 + es.Ez^2
    pseudoPot = (q_Yb^2)/(4*m_Yb171*omega^2) * (E2)
    pseudoPot_eV = pseudoPot / (1.602176634e-19)
    Ueff_J = q_Yb*V + pseudoPot
    Ueff_eV = Ueff_J / (1.602176634e-19)
    minU_eV = minop1(Ueff_eV)
    maxU_eV = maxop1(Ueff_eV)
    depth_eV = maxU_eV - minU_eV  // Trap Depth
    trap_x = minop1(Ueff_J,x)
    trap_y = minop1(Ueff_J,y)
    trap_z = minop1(Ueff_J,z)
    offset_m = sqrt( (trap_x-0)^2 + (trap_y-0)^2 + (trap_z-0)^2 )
    offset_mm = 1e3 * offset_m
    P_est_mW = 1e3 * ( ( omega * ( (eps0 * pi * rf_width * length) / rf_spacing ) * V_rf / sqrt(2) )^2 )

Selections
  sel1: Explicit "trap_vacuum" on no domains
  sel2: Explicit on no points

Couplings
  maxop1: Maximum "Pseudopotential Max" on domains 8
  minop1: Minimum "Pseudopotential Min" on domains 8

Geometry
  geom1 "Geometry 1" (3D, length unit mm)
    sph1: Sphere "Exterior Vacuum" | r = length; pos = {0, 0, 0.025}; axistype = x
    blk1: Block "Interior Vacuum" | size = {0.005, length*0.65, 0.005}; base = center; pos = {0, 0, 0.15}
    blk2: Block "Base" | size = {3*center_width+3*rf_spacing+2*rf_width, length, 0.01}; base = center; pos = {0, 0, -0.01}
    blk3: Block "Center DC Electrode" | size = {center_width, length, 0.01}; base = center
    blk4: Block "Left RF Electrode"
      size = {rf_width, length, 0.01}
      base = center
      pos = {-(0.5*center_width+rf_spacing+0.5*rf_width), 0, 0}
    blk5: Block "Right RF Electrode"
      size = {rf_width, length, 0.01}
      base = center
      pos = {0.5*center_width+rf_spacing+0.5*rf_width, 0, 0}
    cyl1: Cylinder "Endcap 1" | r = 0.1; h = 0.01; pos = {0, -(length/2+0.05), 0.12}; axistype = y
    cyl2: Cylinder "Endcap 2" | r = 0.1; h = 0.01; pos = {0, 0.05+length/2, 0.12}; axistype = y
    blk6: Block "Right DC Electrode"
      size = {center_width, length, 0.01}
      base = center
      pos = {center_width+1.5*rf_spacing+rf_width, 0, 0}
    blk7: Block "Left DC Electrode"
      size = {center_width, length, 0.01}
      base = center
      pos = {-(center_width+1.5*rf_spacing+rf_width), 0, 0}
    fin: Finalize "Form Union"

Materials
  mat1: Common "Air" on all domains
    def: def "Basic"
      thermalexpansioncoefficient = alpha_p(pA,T)
      molarmass = 0.02897[kg/mol]
      bulkviscosity = muB(T)
      relpermeability = 1
      relpermittivity = 1
      dynamicviscosity = eta(T)
      ratioofspecificheat = 1.4
      electricconductivity = 0[S/m]
      heatcapacity = Cp(T)
      density = rho(pA,T)
      thermalconductivity = k(T)
      soundspeed = cs(T)
      eta: Piecewise | arg = T; pieces = {200.0, 1600.0, -8.38278E-7+8.35717342E-8*T^1-7.69429583E-11*T^2+4.6437266E-14*T^3-1.06585607E-17*T^4}; argunit = K; fununit = Pa*s
      Cp: Piecewise | arg = T; pieces = {200.0, 1600.0, 1047.63657-0.372589265*T^1+9.45304214E-4*T^2-6.02409443E-7*T^3+1.2858961E-10*T^4}; argunit = K; fununit = J/(kg*K)
      rho: Analytic | expr = pA*0.02897/R_const[K*mol/J]/T; args = {pA, T}; fununit = kg/m^3; argunit = {Pa, K}
      k: Piecewise | arg = T; pieces = {200.0, 1600.0, -0.00227583562+1.15480022E-4*T^1-7.90252856E-8*T^2+4.11702505E-11*T^3-7.43864331E-15*T^4}; argunit = K; fununit = W/(m*K)
      cs: Analytic | expr = sqrt(1.4*R_const[K*mol/J]/0.02897*T); args = T; fununit = m/s; argunit = K
      an1: Analytic | funcname = alpha_p; expr = -1/rho(pA,T)*d(rho(pA,T),T); args = {pA, T}; fununit = 1/K; argunit = {Pa, K}
      an2: Analytic "Analytic 2a" | funcname = muB; expr = 0.6*eta(T); args = T; fununit = Pa*s; argunit = K
    RefractiveIndex: RefractiveIndex
      n = 1
      ki = 0
    NonlinearModel: NonlinearModel
      BA = def.gamma-1
    idealGas: idealGas
      Rs = R_const/Mn
      heatcapacity = Cp(T)
      ratioofspecificheat = 1.4
      molarmass = 0.02897
      Cp: Piecewise | arg = T; pieces = {200.0, 1600.0, 1047.63657-0.372589265*T^1+9.45304214E-4*T^2-6.02409443E-7*T^3+1.2858961E-10*T^4}; argunit = K; fununit = J/(kg*K)

Physics
  es: Electrostatics on all domains
    dependent variable V
    ccn1: ChargeConservationFluid "Charge Conservation 1" (default)
    zc1: ZeroCharge (default)
    init1: init "Initial Values 1" (default)
    pot1: ElectricPotential "rf_in-phase" on boundaries 55 | V0 = V_dc + V_rf
    pot2: ElectricPotential "rf_out-of-phase" on boundaries 19 | V0 = V_dc + V_rf
    pot3: ElectricPotential on boundaries 1-4, 41, 42, 45, 46
    pot4: ElectricPotential on boundaries 26, 29 | V0 = V_endcap
    pot5: ElectricPotential "Dc potential" on boundaries 11, 34, 62 | V0 = V_dc

Mesh
  mesh1 "Mesh 1"
    size: MeshSizeDefault | hauto = 2
    ftet1: FreeTet "Free Tetrahedral 1" on remaining entities | optcurved = on

Studies
  std1 "Study 1"
    stat: Stationary

Solver configurations
  sol1 "Solution 1" (study std1)
    v1: Variables "Dependent Variables 1"
    s1: Stationary "Stationary Solver 1"
      fc1: FullyCoupled | linsolver = i1
      i1: Iterative | linsolver = cg
        mg1: Multigrid | prefun = amg

Datasets
  dset1: Solution | solution = sol1

Derived values
  max1: MaxVolume "Umax" on selection sel1 | data = dset1; table = new; expr = Ueff_eV
  min1: MinVolume "Umin" on selection sel1 | data = dset1; table = new; expr = Ueff_eV
  gev1: EvalGlobal "Global Evaluation 1"
    data = dset1
    table = tbl1
    expr = {depth_eV, minU_eV, maxU_eV, trap_x, trap_y, trap_z, offset_mm, P_est_mW}
    unit = {, , , , , , , kg^2*m^6/(s^8*A^2)}

Tables
  tbl1: Table
    // Global Evaluation 1
    depth_eV | minU_eV | maxU_eV | trap_x | trap_y | trap_z | offset_mm | P_est_mW (kg^2*m^6/(s^8*A^2))
    25.5483 | 138.706 | 164.254 | 0 | -0.000383988 | 0.0001525 | 0.413162 | 0.00163001

Plots
  pg1: PlotGroup3D "Electric Potential (es)" | data = dset1
    mslc1: Multislice
      expr = V
      multiplanexmethod = coord
      xcoord = es.CPx
      multiplaneymethod = coord
      ycoord = es.CPy
      multiplanezmethod = coord
      zcoord = es.CPz
    strmsl1: StreamlineMultislice
      expr = {es.Ex, es.Ey, es.Ez}
      multiplanexmethod = coord
      xcoord = es.CPx
      multiplaneymethod = coord
      ycoord = es.CPy
      multiplanezmethod = coord
      zcoord = es.CPz
      udist = 0.02
      col1: Color "Color Expression 1" | expr = V
      filt1: Filter | expr = !isScalingSystemDomain
  pg2: PlotGroup3D "Electric Field Norm (es)" | data = dset1
    mslc1: Multislice
      expr = es.normE
      multiplanexmethod = coord
      xcoord = es.CPx
      multiplaneymethod = coord
      ycoord = es.CPy
      multiplanezmethod = coord
      zcoord = es.CPz
      rangeminpositive = 15202.487021222063
      rangeisshared = on
    strmsl1: StreamlineMultislice
      expr = {es.Ex, es.Ey, es.Ez}
      multiplanexmethod = coord
      xcoord = es.CPx
      multiplaneymethod = coord
      ycoord = es.CPy
      multiplanezmethod = coord
      zcoord = es.CPz
      udist = 0.02
      col1: Color "Color Expression 1" | expr = es.normE
      filt1: Filter | expr = !isScalingSystemDomain
  pg3: PlotGroup3D "Pseudopotential" | data = dset1
    slc1: Slice
      expr = pseudoPot
      unit = 1/F
      quickzmethod = coord
      quickznumber = 4
      quickxmethod = coord
      shiftminmax = {-0.00065405, 0.00065405}
      rangeminpositive = 4.32506960644e-24